<!-- Mechanical RuleBasedContactManager Example -->
<Node name="root" dt="0.01">
    <VisualStyle displayFlags="showBehaviorModels showVisual" />
    <FreeMotionAnimationLoop />
	<GenericConstraintSolver maxIterations="1000" tolerance="0.001"/>
    <CollisionPipeline depth="6" verbose="0" draw="0" />
    <BruteForceDetection name="N2" />
    <LocalMinDistance name="Proximity" alarmDistance="1.5" contactDistance="1.0" angleCone="0.0" />
    <RuleBasedContactManager name="Response" response="FrictionContact" rules="4 * default" />
    <CollisionGroup name="Group" />

    <Node name="Torus1">
        <MeshObjLoader filename="mesh/torus2_for_collision.obj" name="loader" />
        <Mesh src="@loader"/>
        <MechanicalObject src="@loader" scale="5.0" />
        <Triangle simulated="0" moving="0" name="Torus1Triangle" group="1" />
        <Line simulated="0" moving="0" name="Torus1Triangle" group="1" />
        <Point simulated="0" moving="0" name="Torus1Triangle" group="1" />
        <MeshObjLoader name="meshLoader0" filename="mesh/torus2.obj" scale="5.0" />
        <OglModel name="Visual" src="@meshLoader0" color="0.5 0.5 0.5 1.0" />
    </Node>

    <Node name="Torus2">
		<EulerImplicit  rayleighStiffness="0.1" rayleighMass="0.1" />
		<CGLinearSolver iterations="25" tolerance="1e-5" threshold="1e-5"/>
        <MechanicalObject template="Rigid" scale="5.0" dx="-12" dy="0" />
        <UniformMass filename="BehaviorModels/torus.rigid" totalmass="5000.0" />
        <UncoupledConstraintCorrection />
        <Node name="Visu">
            <MeshObjLoader name="meshLoader1" filename="mesh/torus.obj" scale="5.0" />
            <OglModel name="Visual" src="@meshLoader1" color="0.0 0.5 0.5 1.0" />
            <RigidMapping input="@.." output="@Visual" />
        </Node>
        <Node name="Surf2">
            <MeshObjLoader filename="mesh/torus_for_collision.obj" name="loader" />
            <Mesh src="@loader"/>
            <MechanicalObject src="@loader" scale="5.0" />
            <Triangle name="Torus2Triangle" group="2" />
            <Line name="Torus2Triangle" group="2" />
            <Point name="Torus2Triangle" group="2" />
            <RigidMapping />
        </Node>
    </Node>

    <Node name="Torus3">
		<EulerImplicit />
		<CGLinearSolver iterations="25" tolerance="1e-5" threshold="1e-5"/>
        <MechanicalObject template="Rigid" scale="5.0" dx="-25" dy="0" />
        <UniformMass filename="BehaviorModels/torus2.rigid" totalmass="5000.0" />
        <UncoupledConstraintCorrection />
        <Node name="Visu">
            <MeshObjLoader name="meshLoader2" filename="mesh/torus2.obj" scale="5.0" />
            <OglModel name="Visual" src="@meshLoader2" color="1.0 0.5 0.25 1.0" />
            <RigidMapping input="@.." output="@Visual" />
        </Node>
        <Node name="Surf2">
            <MeshObjLoader filename="mesh/torus2_for_collision.obj" name="loader" />
            <Mesh src="@loader" />
            <MechanicalObject src="@loader" scale="5.0" />
            <Triangle name="Torus3Triangle" group="3" />
            <Line name="Torus3Triangle" group="3" />
            <Point name="Torus3Triangle" group="3" />
            <RigidMapping />
        </Node>
    </Node>

    <Node name="Torus4">
		<EulerImplicit />
		<CGLinearSolver iterations="25" tolerance="1e-5" threshold="1e-5"/>
        <MechanicalObject template="Rigid" scale="5.0" dx="-38" dy="0" />
        <UniformMass filename="BehaviorModels/torus.rigid" totalmass="5000.0" />
        <UncoupledConstraintCorrection />
        <Node name="Visu">
            <MeshObjLoader name="meshLoader3" filename="mesh/torus.obj" scale="5.0" />
            <OglModel name="Visual" src="@meshLoader3" color="0.0 0.5 0.5 1.0" />
            <RigidMapping input="@.." output="@Visual" />
        </Node>
        <Node name="Surf2">
            <MeshObjLoader filename="mesh/torus_for_collision.obj" name="loader" />
            <Mesh src="@loader"/>
            <MechanicalObject src="@loader" scale="5.0" />
            <Triangle name="Torus4Triangle" group="4" />
            <Line name="Torus4Line" group="4" />
            <Point name="Torus4Point" group="4" />
            <RigidMapping />
        </Node>
    </Node>
</Node>
