<?xml version="1.0"?>
<Node name="root" dt="0.02">
    <VisualStyle displayFlags="showBehaviorModels showForceFields" />
    <CollisionPipeline verbose="0" draw="0" />
    <BruteForceDetection name="N2" />
    <MinProximityIntersection name="Proximity" alarmDistance="0.8" contactDistance="0.5" />
    <CollisionResponse name="Response" response="default" />
    <Node name="cubeFEM">
        <EulerImplicit name="cg_odesolver" printLog="false"  rayleighStiffness="0.1" rayleighMass="0.1" />
        <CGLinearSolver iterations="25" name="linear solver" tolerance="1.0e-9" threshold="1.0e-9" />
        <MechanicalObject />
        <UniformMass mass="0.25" />
        <RegularGrid nx="5" ny="5" nz="5" xmin="-3.5" xmax="3.5" ymin="-3.5" ymax="3.5" zmin="-3.5" zmax="3.5" />
        <TetrahedronFEMForceField name="FEM" youngModulus="25" poissonRatio="0.3" computeGlobalMatrix="false" updateStiffnessMatrix="false" method="large" />
        <Node name="Visu">
            <MeshObjLoader name="meshLoader0" filename="mesh/smCube125.obj" />
            <OglModel name="Visual" src="@meshLoader0" color="red" />
            <SubsetMapping input="@.." output="@Visual" />
        </Node>
        <Node name="Surf">
            <MeshObjLoader name="loader" filename="mesh/smCube125.obj" />
            <Mesh src="@loader" />
            <MechanicalObject src="@loader" />
            <Triangle />
            <Line />
            <Point />
            <SubsetMapping />
        </Node>
    </Node>
    <Node name="Floor">
        <MeshObjLoader name="loader" filename="mesh/floor3.obj" />
        <Mesh src="@loader" />
        <MechanicalObject src="@loader" dy="-10" scale="1.75" />
        <Triangle name="FloorTriangle" simulated="0" moving="0" />
        <Line name="FloorLine" simulated="0" moving="0" />
        <Point name="FloorLine" simulated="0" moving="0" />
        <MeshObjLoader name="meshLoader1" filename="mesh/floor3.obj" scale="1.75" />
        <OglModel name="FloorV" src="@meshLoader1" texturename="textures/brushed_metal.bmp" dy="-10" />
    </Node>
</Node>
