<Node name="root" dt="0.02">
    <VisualStyle displayFlags="showVisual showBehaviorModels" />
    <CollisionPipeline verbose="0" name="CollisionPipeline" />
    <BruteForceDetection name="N2" />
    <CollisionResponse response="default" name="collision response" />
    <DiscreteIntersection />
    <Node name="Liver">
        <EulerImplicit name="cg_odesolver" printLog="false"  rayleighStiffness="0.1" rayleighMass="0.1" />
        <CGLinearSolver iterations="25" name="linear solver" tolerance="1.0e-9" threshold="1.0e-9" />
        <MeshGmshLoader name="loader" filename="mesh/liver.msh" />
        <Mesh src="@loader" />
        <MechanicalObject src="@loader" template="Vec3f" name="dofs" />
        <UniformMass name="mass" mass="0.05" />
        <TetrahedronFEMForceField name="FEM" youngModulus="500" poissonRatio="0.3" computeGlobalMatrix="false" method="large" />
        <FixedPlaneConstraint direction="0 0 1" dmin="-3" dmax="1" />
        <BoxConstraint box="-5 4.8 -.2 5 6 1" />
        <Node name="Visu">
            <MeshObjLoader name="meshLoader0" filename="mesh/liver-smooth.obj" />
            <OglModel name="VisualModel" src="@meshLoader0" color="red" />
            <BarycentricMapping input="@.." output="@VisualModel" name="visual mapping" />
        </Node>
        <Node name="Surf">
	    <SphereLoader filename="mesh/liver.sph" />
            <MechanicalObject position="@[-1].position" />
            <Sphere name="CollisionModel" listRadius="@[-2].listRadius"  />
            <BarycentricMapping name="sphere mapping" />
        </Node>
    </Node>
</Node>
