<Node dt="0.01" multiThreadSimulation="0" name="root" time="0">
    <VisualStyle displayFlags="showVisual showBehaviorModels" />
    <CollisionPipeline depth="6" verbose="0" draw="0" />
    <BruteForceDetection name="N2" />
    <NewProximityIntersection name="Proximity" alarmDistance="0.3" contactDistance="0.2" />
    <CollisionResponse name="Response" response="default" />
    <CollisionGroup name="Group" />
    <Node name="LiverParabolic">
        <EulerImplicit name="cg_odesolver" printLog="false"  rayleighStiffness="0.1" rayleighMass="0.1" />
        <CGLinearSolver iterations="25" name="linear solver" tolerance="1.0e-9" threshold="1.0e-9" />
        <MechanicalObject template="Rigid" name="DOFs" position="0 0 0 0 0 0 1" />
        <UniformMass name="mass" totalmass="1" showAxisSizeFactor="0.1" />
        <ParabolicConstraint name="parabol" indices="0" P1="1 0 0" P2="5 3 1" P3="7 6 -5" BeginTime="0.5" EndTime="1.5" />
        <Node name="Visu">
            <MeshObjLoader name="meshLoader0" filename="mesh/liver-smooth.obj" />
            <OglModel name="VisualModel" src="@meshLoader0" color="red" />
            <RigidMapping input="@.." output="@VisualModel" name="visual mapping" />
        </Node>
        <Node name="Surf">
	    <SphereLoader filename="mesh/liver.sph" />
            <MechanicalObject position="@[-1].position" />
            <Sphere name="CollisionModel" listRadius="@[-2].listRadius" />
            <RigidMapping name="sphere mapping" />
        </Node>
    </Node>
    <Node name="CubeFixed">
        <MeshObjLoader name="loader" filename="mesh/cube.obj" />
        <Mesh src="@loader" />
        <MechanicalObject src="@loader" scale="20" dz="-35" />
        <Triangle simulated="0" moving="0" />
        <MeshObjLoader name="meshLoader1" filename="mesh/cube.obj" scale="20" />
        <OglModel name="Visual" src="@meshLoader1" color="gray" dz="-35" />
    </Node>
</Node>
