<?xml version="1.0"?>
<Node 	name="root" gravity="0 -1 0" dt="0.05"  >
    <VisualStyle displayFlags="showBehaviorModels showForceFields" />
    <CollisionPipeline verbose="0" draw="0" />
    <BruteForceDetection name="N2" />
    <MinProximityIntersection name="Proximity" alarmDistance="0.8" contactDistance="0.5" />
    <CollisionResponse name="Response" response="default" />
	<Node 	name="dragon"  >
		<EulerImplicit name="cg_odesolver" printLog="false"  rayleighStiffness="0.1" rayleighMass="0.1" />
		<CGLinearSolver iterations="25" name="linear solver" tolerance="1.0e-9" threshold="1.0e-9" />
		<MeshObjLoader name="loader" filename="mesh/dragon.obj" />
		<Mesh name="topo" src="@loader" />
		<MechanicalObject name="dofs" src="@loader" scale="1" dz="10" />
		<UniformMass mass="3" />

		<ClusteringEngine template="Vec3d" name="clustering" radius='1'  number='50' position="@topo.position"/>
		<ShapeMatching template="Vec3d" name="shapeMatching" iterations='1' position="@dofs.position" cluster="@clustering.cluster"/>
	 	<PositionBasedDynamicsConstraint template="Vec3d" stiffness = '1' position="@shapeMatching.targetPosition"/>

        <Node name="Visu">
            <MeshObjLoader name="meshLoader0" filename="mesh/dragon.obj" />
            <OglModel name="Visual" src="@meshLoader0" color="red" dz="10" />
            <IdentityMapping input="@.." output="@Visual" />
        </Node>
        <Node name="Surf">
            <MeshObjLoader name="loader" filename="mesh/dragon.obj" />
            <Mesh src="@loader" />
            <MechanicalObject src="@loader" dz="10" />
            <Triangle contactStiffness="1000" />
            <Line contactStiffness="1000" />
            <Point contactStiffness="1000" />
            <IdentityMapping />
        </Node>
	</Node>
    <Node name="Floor">
        <MeshObjLoader name="loader" filename="mesh/floor3.obj" />
        <Mesh src="@loader" />
        <MechanicalObject src="@loader" dy="-10" scale="1.75" />
        <Triangle name="FloorTriangle" simulated="0" moving="0" />
        <Line name="FloorLine" simulated="0" moving="0" />
        <Point name="FloorLine" simulated="0" moving="0" />
        <MeshObjLoader name="meshLoader1" filename="mesh/floor3.obj" scale="1.75" />
        <OglModel name="FloorV" src="@meshLoader1" texturename="textures/brushed_metal.bmp" dy="-10" />
    </Node>
</Node>
