<Node name="root" gravity="0 0 0" dt="0.01" time="0">
    <VisualStyle displayFlags="showVisual" />
    <EulerImplicitSolver name="cg_odesolver" printLog="0" rayleighStiffness="0.1" rayleighMass="0.1" />
    <CGLinearSolver name="linear solver" iterations="50" tolerance="1e-009" threshold="1e-009" />
    <MechanicalObject template="Rigid" name="DOFs" rest_position="0 0 0 0 0 0 1 0 0 0 0 0 0 1 0 0 0 0 0 0 1 0 0 0 0 0 0 1 0 0 0 0 0 0 1" position="-1.161 0 1.706 0 0.194787 0 0.980846 &#x0A;&#x09;&#x09;&#x09;&#x09;&#x09;&#x09;&#x09;&#x09;&#x09;&#x09;&#x09;&#x09;&#x09;&#x09;&#x09;&#x09;&#x09;&#x09;&#x09;&#x09;&#x09;&#x09;&#x09;&#x09;&#x09;&#x09;&#x09;&#x09;&#x09;&#x09;&#x09;&#x09;&#x09;&#x09;&#x09;-6.7 4 1.706 0 0 0.707107 0.707107 &#x0A;&#x09;&#x09;&#x09;&#x09;&#x09;&#x09;&#x09;&#x09;&#x09;&#x09;&#x09;&#x09;&#x09;&#x09;&#x09;&#x09;&#x09;&#x09;&#x09;&#x09;&#x09;&#x09;&#x09;&#x09;&#x09;&#x09;&#x09;&#x09;&#x09;&#x09;&#x09;&#x09;&#x09;&#x09;&#x09;1.790 0 -5.503 0 0.229019 0 0.973422&#x09;&#x0A;&#x09;&#x09;&#x09;&#x09;&#x09;&#x09;&#x09;&#x09;&#x09;&#x09;&#x09;&#x09;&#x09;&#x09;&#x09;&#x09;&#x09;&#x09;&#x09;&#x09;&#x09;&#x09;&#x09;&#x09;&#x09;&#x09;&#x09;&#x09;&#x09;&#x09;&#x09;&#x09;&#x09;&#x09;&#x09;-6.7 5.2 -3.5 0 0 0.707107 0.707107&#x0A;&#x09;&#x09;&#x09;&#x09;&#x09;&#x09;&#x09;&#x09;&#x09;&#x09;&#x09;&#x09;&#x09;&#x09;&#x09;&#x09;&#x09;&#x09;&#x09;&#x09;&#x09;&#x09;&#x09;&#x09;&#x09;&#x09;&#x09;&#x09;&#x09;&#x09;&#x09;&#x09;&#x09;&#x09;&#x09;0 0 0 0 0 0 1" restScale="1" />
    <UniformMass template="Rigid" name="mass" mass="50 50 [1 0 0,0 1 0,0 0 1]" showAxisSizeFactor="2" />
    <FixedConstraint template="Rigid" name="fixOrigin" indices="4" />
    <!--  	SELF SUPPORT 	 -->
    <!--
		<GearSpringForceField template="Rigid" name="gear1"  showFactorSize='5' spring="BEGIN_SPRING  0 0 2 2 AXIS 1 1 KS_T 2000000  KS_R 2000000 2000000 KD 1 RATIO 2 END_SPRING" />
		<GearSpringForceField template="Rigid" name="gear2"  showFactorSize='5' spring="BEGIN_SPRING  0 0 1 1 AXIS 1 1 KS_T 2000000  KS_R 2000000 2000000 KD 1 RATIO -1.5385 END_SPRING" />
		<GearSpringForceField template="Rigid" name="gear3"  showFactorSize='5' spring="BEGIN_SPRING  1 1 3 3 AXIS 1 1 KS_T 2000000  KS_R 2000000 2000000 KD 1 RATIO 2.166667 END_SPRING" />
 -->
    <!--  	EXTERNAL SUPPORT -->
    <Node name="Gear">
        <MechanicalObject template="Rigid" name="attaches" rest_position="0 0 0 0 0 0 1 0 0 0 0 0 0 1 0 0 0 0 0 0 1 0 0 0 0 0 0 1 -1.161 0 1.706 0 0.194787 0 0.980846 -6.7 4 1.706 0 0 0.707107 0.707107 1.790 0 -5.503 0 0.229019 0 0.973422 -6.7 5.2 -3.5 0 0 0.707107 0.707107" restScale="1" />
        <RigidRigidMapping template="Rigid,Rigid" input="@.." output="@." repartition="1 1 1 1 4" />
        <GearSpringForceField template="Rigid" name="springs" showFactorSize="5" spring="BEGIN_SPRING  4 0 6 2 AXIS 1 1 KS_T 2000000  KS_R 2000000 2000000 KD 1 RATIO 2 END_SPRING&#x0A;&#x09;&#x09;&#x09;&#x09;&#x09;&#x09;&#x09;&#x09;&#x09;&#x09;&#x09;&#x09;&#x09;&#x09;&#x09;&#x09;&#x09;&#x09;&#x09;&#x09;&#x09;&#x09;&#x09;  BEGIN_SPRING  4 0 5 1 AXIS 1 1 KS_T 2000000  KS_R 2000000 2000000 KD 1 RATIO -1.5385 END_SPRING&#x0A;&#x09;&#x09;&#x09;&#x09;&#x09;&#x09;&#x09;&#x09;&#x09;&#x09;&#x09;&#x09;&#x09;&#x09;&#x09;&#x09;&#x09;&#x09;&#x09;&#x09;&#x09;&#x09;&#x09;  BEGIN_SPRING  5 1 7 3 AXIS 1 1 KS_T 2000000  KS_R 2000000 2000000 KD 1 RATIO 2.166667 END_SPRING" />
    </Node>
    <Node name="0">
        <MeshObjLoader name="MeshLoader" filename="mesh/gear0.obj" />
        <Mesh src="@MeshLoader" />
        <MechanicalObject name="PointSet" />
        <Triangle />
        <RigidMapping template="Rigid,Vec3d" index="0" />
        <Node name="Visu">
            <MeshObjLoader name="meshLoader0" filename="mesh/gear0.obj" />
            <OglModel template="ExtVec3f" name="Visual" src="@meshLoader0" />
            <IdentityMapping template="Vec3d,ExtVec3f" input="@.." output="@Visual" />
        </Node>
    </Node>
    <Node name="1">
        <MeshObjLoader name="MeshLoader" filename="mesh/gear1.obj" />
        <Mesh src="@MeshLoader" />
        <MechanicalObject name="PointSet" />
        <Triangle />
        <RigidMapping template="Rigid,Vec3d" index="1" />
        <Node name="Visu">
            <MeshObjLoader name="meshLoader1" filename="mesh/gear1.obj" />
            <OglModel template="ExtVec3f" name="Visual" src="@meshLoader1" />
            <IdentityMapping template="Vec3d,ExtVec3f" input="@.." output="@Visual" />
        </Node>
    </Node>
    <Node name="2">
        <MeshObjLoader name="MeshLoader" filename="mesh/gear2.obj" />
        <Mesh src="@MeshLoader" />
        <MechanicalObject name="PointSet" />
        <Triangle />
        <RigidMapping template="Rigid,Vec3d" index="2" />
        <Node name="Visu">
            <MeshObjLoader name="meshLoader2" filename="mesh/gear2.obj" />
            <OglModel template="ExtVec3f" name="Visual" src="@meshLoader2" />
            <IdentityMapping template="Vec3d,ExtVec3f" input="@.." output="@Visual" />
        </Node>
    </Node>
    <Node name="3">
        <MeshObjLoader name="MeshLoader" filename="mesh/gear3.obj" />
        <Mesh src="@MeshLoader" />
        <MechanicalObject name="PointSet" />
        <Triangle />
        <RigidMapping template="Rigid,Vec3d" index="3" />
        <Node name="Visu">
            <MeshObjLoader name="meshLoader3" filename="mesh/gear3.obj" />
            <OglModel template="ExtVec3f" name="Visual" src="@meshLoader3" />
            <IdentityMapping template="Vec3d,ExtVec3f" input="@.." output="@Visual" />
        </Node>
    </Node>
    <Node name="support">
        <MeshObjLoader name="MeshLoader" filename="mesh/gearsupport.obj" />
        <Mesh src="@MeshLoader" />
        <MechanicalObject name="PointSet" />
        <Triangle />
        <RigidMapping template="Rigid,Vec3d" index="4" />
        <Node name="Visu">
            <MeshObjLoader name="meshLoader4" filename="mesh/gearsupport.obj" />
            <OglModel template="ExtVec3f" name="Visual" src="@meshLoader4" material="Default Diffuse 1 1 1 0.8 1 Ambient 1 0.2 0.2 0.2 1 Specular 0 1 0 0 1 Emissive 0 1 0 0 1 Shininess 0 45" />
            <IdentityMapping template="Vec3d,ExtVec3f" input="@.." output="@Visual" />
        </Node>
    </Node>
</Node>
