<?xml version="1.0"?>
<Node name="root" dt="0.01" gravity="0 -9.810 0">
	<VisualStyle displayFlags="" /> <!-- showInteractionForceFields -->
    <FreeMotionAnimationLoop />
    <GenericConstraintSolver />
    <CollisionPipeline depth="6" verbose="0" draw="0" />
    <BruteForceDetection name="N2" />
    <LocalMinDistance name="Proximity" alarmDistance="0.2" contactDistance="0.1" angleCone="0.0" />
    <CollisionResponse name="Response" response="FrictionContact" responseParams="mu=0.2" />
	<SleepController immobileThreshold="0.2" rotationThreshold="0.1" minTimeSinceWakeUp="0.1" printLog="1" />

	<LightManager />
    <SpotLight color="1 1 1" position="0 80 50" direction="0 -1 -1" cutoff="30" exponent="1" />

    <Node name="Plan">
		<MeshObjLoader name="loader" filename="mesh/cube.obj" triangulate="1" />
		<TransformEngine name="transform" translation="0 -1.5 0" rotation="0 0 10" scale="10 0.2 4" input_position="@loader.position" />
		<Mesh src="@loader" />
		<MechanicalObject position="@transform.output_position" template="Vec3d" />
		<Triangle simulated="0" moving="0" />
		<Line simulated="0" moving="0" />
		<Point simulated="0" moving="0" />
		<OglModel name="Visual" color="1 0 0 1" src="@loader" position="@transform.output_position"/>
    </Node>

    <Node name="Cube1" canChangeSleepingState="true">
        <EulerImplicit printLog="false"  rayleighStiffness="0.1" rayleighMass="0.1" />
        <CGLinearSolver iterations="25" tolerance="1.0e-9" threshold="1.0e-9" />
        <MechanicalObject template="Rigid" scale="1.0" dx="-3.0" dy="-0.5" dz="0.0" />
        <UniformMass totalmass="1" />
        <UncoupledConstraintCorrection />
        <Node name="Visu">
			<OglShader vertFilename="sleepColorShader.vert" fragFilename="sleepColorShader.frag"/>
			<ValuesFromIndices name="colorEngine" template="Vec3" in="0 0 1  0.5 0.5 0.5" indices="@Cube1.sleeping" />
			<OglFloat3Variable id="color" value="@colorEngine.out" />
            <MeshObjLoader name="meshLoader0" filename="mesh/cube.obj" />
            <OglModel name="Visual" src="@meshLoader0" />
            <RigidMapping object1="../.." object2="Visual" />
        </Node>
        <Node name="Colli">
            <MeshObjLoader name="loader" filename="mesh/cube.obj" triangulate="1" />
            <Mesh src="@loader" />
            <MechanicalObject src="@loader" />
            <Triangle />
            <Line />
            <Point />
            <RigidMapping />
        </Node>
    </Node>

	<Node name="Cube2" canChangeSleepingState="true">
        <EulerImplicit printLog="false" />
        <CGLinearSolver iterations="25" tolerance="1.0e-9" threshold="1.0e-9" />
        <MechanicalObject template="Rigid" scale="1.0" dx="1.0" dy="3" dz="0.0" />
        <UniformMass totalmass="1" />
        <UncoupledConstraintCorrection />
        <Node name="Visu">
			<OglShader vertFilename="sleepColorShader.vert" fragFilename="sleepColorShader.frag"/>
			<ValuesFromIndices name="colorEngine" template="Vec3" in="0 1 0  0.5 0.5 0.5" indices="@Cube2.sleeping" />
			<OglFloat3Variable id="color" value="@colorEngine.out" />
            <MeshObjLoader name="meshLoader1" filename="mesh/cube.obj" />
            <OglModel name="Visual" src="@meshLoader1" />
            <RigidMapping object1="../.." object2="Visual" />
        </Node>
        <Node name="Colli">
            <MeshObjLoader name="loader" filename="mesh/cube.obj" triangulate="1" />
            <Mesh src="@loader" />
            <MechanicalObject src="@loader" />
            <Triangle />
            <Line />
            <Point />
            <RigidMapping />
        </Node>
    </Node>

	<Node name="Cube3" canChangeSleepingState="true">
        <EulerImplicit printLog="false" />
        <CGLinearSolver iterations="25" tolerance="1.0e-9" threshold="1.0e-9" />
        <MechanicalObject template="Rigid" scale="1.0" dx="8.0" dy="12" dz="0.0" />
        <UniformMass totalmass="1" />
        <UncoupledConstraintCorrection />
        <Node name="Visu">
			<OglShader vertFilename="sleepColorShader.vert" fragFilename="sleepColorShader.frag"/>
			<ValuesFromIndices name="colorEngine" template="Vec3" in="1 1 0  0.5 0.5 0.5" indices="@Cube3.sleeping" />
			<OglFloat3Variable id="color" value="@colorEngine.out" />
            <MeshObjLoader name="meshLoader2" filename="mesh/cube.obj" />
            <OglModel name="Visual" src="@meshLoader2" />
            <RigidMapping object1="../.." object2="Visual" />
        </Node>
        <Node name="Colli">
            <MeshObjLoader name="loader" filename="mesh/cube.obj" triangulate="1" />
            <Mesh src="@loader" />
            <MechanicalObject src="@loader" />
            <Triangle />
            <Line />
            <Point />
            <RigidMapping />
        </Node>
    </Node>
</Node>
