<?xml version="1.0"?>
<Node name="root" dt="0.02">
    <CollisionPipeline verbose="0" draw="0" />
    <BruteForceDetection name="N2" />
    <MinProximityIntersection name="Proximity" alarmDistance="0.8" contactDistance="0.5" />
    <CollisionResponse name="Response" response="default" />
	<SleepController immobileThreshold="0.2" minTimeSinceWakeUp="0.1" printLog="0" />

    <Node name="Cube1" canChangeSleepingState="true">
        <EulerImplicit name="cg_odesolver" printLog="false"  rayleighStiffness="0.1" rayleighMass="0.1" />
        <CGLinearSolver iterations="25" name="linear solver" tolerance="1.0e-9" threshold="1.0e-9" />
        <MechanicalObject />
        <UniformMass mass="0.25" />
        <RegularGrid nx="5" ny="5" nz="5" xmin="-3.5" xmax="3.5" ymin="-3.5" ymax="3.5" zmin="-3.5" zmax="3.5" />
        <TetrahedronFEMForceField name="FEM" youngModulus="25" poissonRatio="0.3" computeGlobalMatrix="false" updateStiffnessMatrix="false" method="large" />
        <Node name="Visu">
			<OglShader vertFilename="sleepColorShader.vert" fragFilename="sleepColorShader.frag"/>
			<ValuesFromIndices name="colorEngine" template="Vec3" in="1 1 0  0.5 0.5 0.5" indices="@Cube1.sleeping" />
			<OglFloat3Variable id="color" value="@colorEngine.out" />
            <MeshObjLoader name="meshLoader0" filename="mesh/smCube125.obj" />
            <OglModel name="Visual" src="@meshLoader0" color="red" />
            <SubsetMapping object1="../.." object2="Visual" />
        </Node>
        <Node name="Surf">
            <MeshObjLoader name="loader" filename="mesh/smCube125.obj" />
            <Mesh src="@loader" />
            <MechanicalObject src="@loader" />
            <Triangle /> <Line /> <Point /> <SubsetMapping />
        </Node>
    </Node>

	<Node name="Cube2" canChangeSleepingState="true">
        <EulerImplicit name="cg_odesolver" printLog="false" />
        <CGLinearSolver iterations="25" name="linear solver" tolerance="1.0e-9" threshold="1.0e-9" />
        <MechanicalObject dx="50" dy="20"/>
        <UniformMass mass="0.25" />
        <RegularGrid nx="5" ny="5" nz="5" xmin="-3.5" xmax="3.5" ymin="-3.5" ymax="3.5" zmin="-3.5" zmax="3.5" />
        <TetrahedronFEMForceField name="FEM" youngModulus="25" poissonRatio="0.3" computeGlobalMatrix="false" updateStiffnessMatrix="false" method="large" />
        <Node name="Visu">
			<OglShader vertFilename="sleepColorShader.vert" fragFilename="sleepColorShader.frag"/>
			<ValuesFromIndices name="colorEngine" template="Vec3" in="1 0 0  0.5 0.5 0.5" indices="@Cube2.sleeping" />
			<OglFloat3Variable id="color" value="@colorEngine.out" />
            <MeshObjLoader name="meshLoader1" filename="mesh/smCube125.obj" />
            <OglModel name="Visual" src="@meshLoader1" color="red" dx="50" dy="20"/>
            <SubsetMapping object1="../.." object2="Visual" />
        </Node>
        <Node name="Surf">
            <MeshObjLoader name="loader" filename="mesh/smCube125.obj" />
            <Mesh src="@loader" />
            <MechanicalObject src="@loader" dx="50" dy="20" />
            <Triangle /> <Line /> <Point /> <SubsetMapping />
        </Node>
    </Node>

	<Node name="Cube3" canChangeSleepingState="true">
        <EulerImplicit name="cg_odesolver" printLog="false" />
        <CGLinearSolver iterations="25" name="linear solver" tolerance="1.0e-9" threshold="1.0e-9" />
        <MechanicalObject dx="-30" dy="10"/>
        <UniformMass mass="0.25" />
        <RegularGrid nx="5" ny="5" nz="5" xmin="-3.5" xmax="3.5" ymin="-3.5" ymax="3.5" zmin="-3.5" zmax="3.5" />
        <TetrahedronFEMForceField name="FEM" youngModulus="25" poissonRatio="0.3" computeGlobalMatrix="false" updateStiffnessMatrix="false" method="large" />
        <Node name="Visu">
			<OglShader vertFilename="sleepColorShader.vert" fragFilename="sleepColorShader.frag"/>
			<ValuesFromIndices name="colorEngine" template="Vec3" in="0 1 0  0.5 0.5 0.5" indices="@Cube3.sleeping" />
			<OglFloat3Variable id="color" value="@colorEngine.out" />
            <MeshObjLoader name="meshLoader2" filename="mesh/smCube125.obj" />
            <OglModel name="Visual" src="@meshLoader2" color="red" dx="-30" dy="10"/>
            <SubsetMapping object1="../.." object2="Visual" />
        </Node>
        <Node name="Surf">
            <MeshObjLoader name="loader" filename="mesh/smCube125.obj" />
            <Mesh src="@loader" />
            <MechanicalObject src="@loader" dx="-30" dy="10" />
            <Triangle /> <Line /> <Point /> <SubsetMapping />
        </Node>
    </Node>

    <Node name="Floor">
        <MeshObjLoader name="loader" filename="mesh/floor3.obj" />
        <Mesh src="@loader" />
        <MechanicalObject src="@loader" dy="-10" scale="1.75" />
        <Triangle name="FloorTriangle" simulated="0" moving="0" />
        <Line name="FloorLine" simulated="0" moving="0" />
        <Point name="FloorLine" simulated="0" moving="0" />
        <MeshObjLoader name="meshLoader3" filename="mesh/floor3.obj" scaleTex="0.2 0.2" scale="1.75" />
        <OglModel name="FloorV" src="@meshLoader3" texturename="textures/brushed_metal.bmp" dy="-10" />
    </Node>
</Node>
