<Node name="root" dt="0.02">
    <!-- <Simulation name="Simulation" /> -->
    <CollisionPipeline verbose="0" name="CollisionPipeline" />
    <BruteForceDetection name="N2" />
    <CollisionResponse response="default" name="collision response" />
    <DiscreteIntersection />
    <!--<CollisionGroup />-->
    <Node name="Liver" depend="topo dofs">
        <!--<CGImplicit iterations="25"/>-->
        <EulerImplicit name="cg_odesolver" printLog="false"  rayleighStiffness="0.1" rayleighMass="0.1" />
        <CGLinearSolver iterations="25" name="linear solver" tolerance="1.0e-9" threshold="1.0e-9" />
        <MeshGmshLoader name="loader" filename="mesh/liver.msh" />
        <!-- Container for the tetrahedra-->
        <TetrahedronSetTopologyContainer src="@loader" name="topo" />
        <MechanicalObject src="@loader" name="dofs" />
        <!-- Algorithms: used in DiagonalMass to compute the mass -->
        <TetrahedronSetGeometryAlgorithms name="GeomAlgo" />
        <DiagonalMass massDensity="1" name="computed using mass density" />
        <TetrahedralCorotationalFEMForceField name="FEM" youngModulus="3000" poissonRatio="0.3" computeGlobalMatrix="false" method="large" />
        <FixedConstraint name="FixedConstraint" indices="3 39 64" />
        <Node name="Visu" tags="Visual">
            <!-- Using material contained in liver-smooth.obj -->
            <MeshObjLoader name="meshLoader0" filename="mesh/liver-smooth.obj" />
            <OglModel name="VisualModel" src="@meshLoader0" />
            <BarycentricMapping input="@.." output="@VisualModel" name="visual mapping" />
        </Node>
        <Node name="Surf">
	    <SphereLoader filename="mesh/liver.sph" />
            <MechanicalObject position="@[-1].position" />
            <Sphere name="CollisionModel" listRadius="@[-2].listRadius" />
            <BarycentricMapping name="sphere mapping" />
        </Node>
    </Node>
    <OglViewport screenPosition="0 0" screenSize="250 250" cameraPosition="-1 2.7 5" cameraOrientation="-0 -0 -0 1" />
    <OglViewport screenPosition="300 0" screenSize="400 400" cameraRigid="-1 2.7 13 -0 -0 -0 1" />
</Node>
