<?xml version="1.0"?>
<Node name="root" gravity="0 -9.81 0" dt="0.02">
    <VisualStyle displayFlags="showBehavior showVisual" />

    <Node name="Liver" >
        <MeshGmshLoader name="meshLoader" filename="mesh/liver.msh" />
        <TetrahedronSetTopologyContainer name="topo" src="@meshLoader" />
        <MechanicalObject name="dofs" src="@meshLoader" />
        <TetrahedronSetGeometryAlgorithms name="GeomAlgo" />
        <DiagonalMass name="computed using mass density" massDensity="1" />
        <TetrahedralCorotationalFEMForceField template="Vec3d" name="FEM" method="large" poissonRatio="0.3" youngModulus="3000" computeGlobalMatrix="0" />
        <FixedConstraint name="FixedConstraint" indices="3 39 64" />
        <Node name="WireframeVisu" >
            <VisualStyle displayFlags="showVisual showWireframe" />
            <MeshObjLoader name="meshLoader0" filename="mesh/liver-smooth.obj" />
            <OglModel name="VisualModel" src="@meshLoader0" />
            <BarycentricMapping name="visual mapping" input="@../dofs" output="@VisualModel" />
        </Node>
        <Node name="Sphere" >
            <VisualStyle displayFlags="hideBehavior showCollision showWireframe" />
	    <SphereLoader filename="mesh/liver.sph" />
            <MechanicalObject name="spheres" position="@[-1].position" />
            <TSphereModel name="CollisionModel" listRadius="@[-2].listRadius" />
            <BarycentricMapping name="sphere mapping" input="@../dofs" output="@spheres" />
        </Node>


        <Node name="TranslatedSurface" gravity="0 -9.81 0">
<!--             default rendering should be flat rendered and not wireframed -->
            <MeshObjLoader name="meshLoader1" filename="mesh/liver.obj" translation="5 0 0" />
 src="@meshLoader1" />
        </Node>

    </Node>
</Node>
