<?xml version="1.0"?>
<Node 	 name="root"  gravity="0 -1000 0"  dt="0.04"  >
	<VisualStyle name="visualStyle1"  displayFlags="showVisual" />
	<LCPConstraintSolver name="lCPConstraintSolver1"  printLog="0"  initial_guess="0"  build_lcp="0"  tolerance="0.001"  maxIt="1000"  mu="0.2"  group="0" />
	<FreeMotionAnimationLoop name="freeMotionAnimationLoop1" />
	<DefaultPipeline name="defaultPipeline1"  verbose="0"  draw="0"  depth="15" />
	<BruteForceDetection name="N2" />
	<MinProximityIntersection name="Proximity"  alarmDistance="1.5"  contactDistance="1" />
	<LightManager name="lightManager1"  listening="1" />
	<SpotLight name="light1"  color="1 1 1"  position="0 80 25"  direction="0 -1 -0.8"  cutoff="30"  exponent="1" />
	<SpotLight name="light2"  color="1 1 1"  position="0 40 100"  direction="0 0 -1"  cutoff="30"  exponent="1" />
	<VisualManagerPass name="visualManagerPass0"  tags="Visu"  listening="1" />
	<DefaultContactManager name="Response"  response="FrictionContact" />
	<VisualManagerSecondaryPass name="visualManagerSecondaryPass7"  listening="1"  renderToScreen="1"  input_tags="Visu"  fragFilename="shaders/correctionAbberationChromatique.frag" />
	<CompositingVisualLoop name="compositingVisualLoop3" />
	<OglShader name="oglShader0"  tags="Visu"  fileVertexShader="shaders/phong.vert"  fileFragmentShader="shaders/phong.frag" />
	<Node 	 name="Snake"  >
		<SparseGridRamificationTopology name="sparseGridRamificationTopology1"  fileTopology="mesh/snake_body.obj"  n="4 12 3"  nbVirtualFinerLevels="3"  finestConnectivity="0" />
		<EulerImplicitSolver name="cg_odesolver"  rayleighStiffness="0.03"  rayleighMass="1" />
		<CGLinearSolver template="GraphScattered" name="linear solver"  iterations="20"  tolerance="1e-12"  threshold="1e-18" />
		<MechanicalObject template="Vec3d" name="dofs"  position="0 0 0"  velocity="0 0 0"  force="0 0 0"  externalForce="0 0 0"  restScale="1"  translation="0 2 0"  scale3d="1 1 1" />
		<UniformMass template="Vec3d" name="uniformMass1"  totalmass="1" />
		<HexahedronFEMForceField template="Vec3d" name="FEM"  printLog="0"  method="large"  poissonRatio="0.3"  youngModulus="30000"  updateStiffnessMatrix="0"  gatherPt=" "  gatherBsize=" " />
		<UncoupledConstraintCorrection template="Vec3d" name="uncoupledConstraintCorrection1" />
		<Node 	 name="Collis"  >
			<MeshObjLoader name="loader"  filename="mesh/meca_snake_900tri.obj" />
			<MeshTopology name="meshTopology1"  position="@loader.position"  edges="@loader.edges"  triangles="@loader.triangles"  quads="@loader.quads"  tetrahedra="@loader.tetras"  hexahedra="@loader.hexas" />
			<MechanicalObject template="Vec3d" name="CollisModel"  position="@loader.position"  velocity="0 0 0"  force="0 0 0"  externalForce="0 0 0"  restScale="1" />
			<TTriangleModel template="Vec3d" name="tTriangleModel1"  selfCollision="0" />
			<TLineModel template="Vec3d" name="tLineModel1"  selfCollision="0" />
			<TPointModel template="Vec3d" name="tPointModel1"  selfCollision="0" />
			<BarycentricMapping template="Vec3d,Vec3d" name="barycentricMap1"  tags="Visu"  input="@.."  output="@." />
		</Node>
		<Node 	 name="VisuBody"  tags="Visual"  >
			<MeshObjLoader name="meshLoader0" filename="mesh/snake_body.obj" />
			<OglModel template="ExtVec3f" name="VisualBody"  tags="Visu" src="@meshLoader0"  material="Default Diffuse 1 0.74902 0.74902 0.74902 1 Ambient 1 0.2 0.2 0.2 1 Specular 0 1 1 1 1 Emissive 0 0 0 0 0 Shininess 0 45 "  primitiveType="DEFAULT"  blendEquation="GL_FUNC_ADD"  sfactor="GL_SRC_ALPHA"  dfactor="GL_ONE_MINUS_SRC_ALPHA" />
			<BarycentricMapping template="Vec3d,ExtVec3f" name="barycentricMap2"  tags="Visu"  input="@.."  output="@VisualBody" />
		</Node>
		<Node 	 name="VisuCornea"  tags="Visual"  >
			<MeshObjLoader name="meshLoader1" filename="mesh/snake_cornea.obj" />
			<OglModel template="ExtVec3f" name="VisualCornea"  tags="Visu" src="@meshLoader1"  material="Default Diffuse 1 0.74902 0.74902 0.74902 1 Ambient 1 0.2 0.2 0.2 1 Specular 0 1 1 1 1 Emissive 0 0 0 0 0 Shininess 0 45 "  primitiveType="DEFAULT"  blendEquation="GL_FUNC_ADD"  sfactor="GL_SRC_ALPHA"  dfactor="GL_ONE_MINUS_SRC_ALPHA" />
			<BarycentricMapping template="Vec3d,ExtVec3f" name="barycentricMap3"  tags="Visu"  input="@.."  output="@VisualCornea" />
		</Node>
		<Node 	 name="VisuEye"  tags="Visual"  >
			<MeshObjLoader name="meshLoader2" filename="mesh/snake_yellowEye.obj" />
			<OglModel template="ExtVec3f" name="VisualEye"  tags="Visu" src="@meshLoader2"  material="Default Diffuse 1 0.74902 0.74902 0.74902 1 Ambient 1 0.2 0.2 0.2 1 Specular 0 1 1 1 1 Emissive 0 0 0 0 0 Shininess 0 45 "  primitiveType="DEFAULT"  blendEquation="GL_FUNC_ADD"  sfactor="GL_SRC_ALPHA"  dfactor="GL_ONE_MINUS_SRC_ALPHA" />
			<BarycentricMapping template="Vec3d,ExtVec3f" name="barycentricMap4"  tags="Visu"  input="@.."  output="@VisualEye" />
		</Node>
	</Node>
	<Node 	 name="Base"  >
		<Node 	 name="Stick"  >
			<MeshObjLoader name="loader"  tags="Visu"  filename="mesh/collision_batons.obj" />
			<MeshTopology name="meshTopology2"  position="@loader.position"  edges="@loader.edges"  triangles="@loader.triangles"  quads="@loader.quads"  tetrahedra="@loader.tetras"  hexahedra="@loader.hexas" />
			<MechanicalObject template="Vec3d" name="CollisModel"  position="@loader.position"  velocity="0 0 0"  force="0 0 0"  externalForce="0 0 0"  restScale="1" />
			<TLineModel template="Vec3d" name="tLineModel2"  moving="0"  simulated="0" />
			<TPointModel template="Vec3d" name="tPointModel2"  moving="0"  simulated="0" />
		</Node>
		<Node 	 name="Blobs"  >
			<MeshObjLoader name="loader"  tags="Visu"  filename="mesh/collision_boules_V3.obj" />
			<MeshTopology name="meshTopology3"  position="@loader.position"  edges="@loader.edges"  triangles="@loader.triangles"  quads="@loader.quads"  tetrahedra="@loader.tetras"  hexahedra="@loader.hexas" />
			<MechanicalObject template="Vec3d" name="CollisModel"  position="@loader.position"  velocity="0 0 0"  force="0 0 0"  externalForce="0 0 0"  restScale="1" />
			<TTriangleModel template="Vec3d" name="tTriangleModel2"  moving="0"  simulated="0" />
			<TLineModel template="Vec3d" name="tLineModel3"  moving="0"  simulated="0" />
			<TPointModel template="Vec3d" name="tPointModel3"  moving="0"  simulated="0" />
		</Node>
		<Node 	 name="Foot"  >
			<MeshObjLoader name="loader"  tags="Visu"  filename="mesh/collision_pied.obj" />
			<MeshTopology name="meshTopology4"  position="@loader.position"  edges="@loader.edges"  triangles="@loader.triangles"  quads="@loader.quads"  tetrahedra="@loader.tetras"  hexahedra="@loader.hexas" />
			<MechanicalObject template="Vec3d" name="CollisModel"  position="@loader.position"  velocity="0 0 0"  force="0 0 0"  externalForce="0 0 0"  restScale="1" />
			<TTriangleModel template="Vec3d" name="tTriangleModel3"  moving="0"  simulated="0" />
			<TLineModel template="Vec3d" name="tLineModel4"  moving="0"  simulated="0" />
			<TPointModel template="Vec3d" name="tPointModel4"  moving="0"  simulated="0" />
		</Node>
		<Node 	 name="Visu"  tags="Visual"  >
			<MeshObjLoader name="meshLoader3" filename="mesh/SOFA_pod.obj" />
			<OglModel template="ExtVec3f" name="OglModel"  tags="Visu" src="@meshLoader3"  material="Default Diffuse 1 0.74902 0.74902 0.74902 1 Ambient 1 0.2 0.2 0.2 1 Specular 0 1 1 1 1 Emissive 0 0 0 0 0 Shininess 0 45 "  primitiveType="DEFAULT"  blendEquation="GL_FUNC_ADD"  sfactor="GL_SRC_ALPHA"  dfactor="GL_ONE_MINUS_SRC_ALPHA" />
		</Node>
	</Node>
</Node>
