<Node dt="0.02" name="root">
    <CollisionPipeline depth="6" draw="0" verbose="0" />
    <BruteForceDetection name="N2" />
    <MinProximityIntersection alarmDistance="0.3" contactDistance="0.2" name="Proximity" />
    <CollisionResponse name="Response" response="default" />
    <CollisionGroup name="Group" />
    <Node name="TorusFixed">
        <MeshObjLoader name="loader" filename="mesh/torus2_for_collision.obj" />
        <Mesh src="@loader" />
        <MechanicalObject src="@loader" />
        <Triangle moving="0" simulated="0" />
        <Line moving="0" simulated="0" />
        <Point moving="0" simulated="0" />
        <MeshObjLoader name="meshLoader0" filename="mesh/torus2.obj" />
        <OglModel color="0.500 0.500 0.500" src="@meshLoader0" name="Visual" />
    </Node>
    <Node name="TorusFEM">
        <EulerImplicit  rayleighStiffness="0.1" rayleighMass="0.1" />
        <CGLinearSolver iterations="100" threshold="0.00000001" tolerance="1e-05"/>
        <MeshGmshLoader name="loader" filename="mesh/torus_low_res.msh" />
        <Mesh src="@loader" />
        <MechanicalObject dx="7.6871" dy="0.0000" dz="0.9632" rx="10.0000" ry="-15.0000" rz="0.0000" src="@loader" />
        <UniformMass totalmass="5" />
        <TetrahedronFEMForceField computeGlobalMatrix="false" method="polar" name="FEM" poissonRatio="0.3" youngModulus="5000" />
        <Node name="Visu">
            <MeshObjLoader name="meshLoader1" filename="mesh/torus.obj" />
            <OglModel color="1.000 0.000 0.000" dx="7.6871" dy="0.0000" dz="0.9632" src="@meshLoader1" name="Visual" rx="10.0000" ry="-15.0000" rz="0.0000" />
            <BarycentricMapping input="@.." output="@Visual" />
        </Node>
        <Node name="Surf2">
            <MeshObjLoader name="loader" filename="mesh/torus_for_collision.obj" />
            <Mesh src="@loader" />
            <MechanicalObject dx="7.6871" dy="0.0000" dz="0.9632" rx="10.0000" ry="-15.0000" rz="0.0000" src="@loader" />
            <Triangle />
            <Line />
            <Point />
            <BarycentricMapping />
        </Node>
    </Node>
    <Node name="TorusSpring">
        <EulerImplicit />
        <CGLinearSolver iterations="100" threshold="0.00000001" tolerance="1e-05"/>
        <MeshGmshLoader name="loader" filename="mesh/torus2_low_res.msh" />
        <Mesh src="@loader" />
        <MechanicalObject dx="10.0309" dy="0.0000" dz="2.1145" rx="15.0000" ry="-25.0000" rz="0.0000" src="@loader" />
        <UniformMass totalmass="5" />
        <MeshSpringForceField name="Springs" tetrasDamping="4" tetrasStiffness="1000" />
        <Node name="Visu">
            <MeshObjLoader name="meshLoader2" filename="mesh/torus2.obj" />
            <OglModel color="0.000 1.000 0.000" dx="10.0309" dy="0.0000" dz="2.1145" src="@meshLoader2" name="Visual" rx="15.0000" ry="-25.0000" rz="0.0000" />
            <BarycentricMapping input="@.." output="@Visual" />
        </Node>
        <Node name="Surf2">
            <MeshObjLoader name="loader" filename="mesh/torus2_for_collision.obj" />
            <Mesh src="@loader" />
            <MechanicalObject dx="10.0309" dy="0.0000" dz="2.1145" rx="15.0000" ry="-25.0000" rz="0.0000" src="@loader" />
            <Triangle />
            <Line />
            <Point />
            <BarycentricMapping />
        </Node>
    </Node>
    <Node name="TorusFFD">
        <EulerImplicit />
        <CGLinearSolver iterations="100" threshold="0.00000001" />
        <MechanicalObject dx="12.3521" dy="0.0000" dz="3.2783" rx="20.0000" ry="-30.0000" rz="0.0000" />
        <UniformMass totalmass="5" />
        <RegularGrid nx="6" ny="2" nz="5" xmax="2.5" xmin="-2.5" ymax="0.5" ymin="-0.5" zmax="2" zmin="-2" />
        <RegularGridSpringForceField damping="2" name="Springs" stiffness="200" />
        <Node name="Visu">
            <MeshObjLoader name="meshLoader3" filename="mesh/torus.obj" />
            <OglModel color="1.000 1.000 0.000" src="@meshLoader3" name="Visual" />
            <BarycentricMapping input="@.." output="@Visual" />
        </Node>
        <Node name="Surf2">
            <MeshObjLoader name="loader" filename="mesh/torus_for_collision.obj" />
            <Mesh src="@loader" />
            <MechanicalObject src="@loader" />
            <Triangle />
            <Line />
            <Point />
            <BarycentricMapping />
        </Node>
    </Node>
    <Node name="TorusRigid">
        <EulerImplicit />
        <CGLinearSolver iterations="100" threshold="0.00000001" tolerance="1e-05"/>
        <MechanicalObject dx="14.4679" dy="0.0000" dz="4.7604" rx="25.0000" ry="-35.0000" rz="0.0000" template="Rigid" />
        <UniformMass />
        <Node name="Visu">
            <MeshObjLoader name="meshLoader4" filename="mesh/torus2.obj" />
            <OglModel color="0.500 0.500 0.500" src="@meshLoader4" name="Visual" />
            <RigidMapping input="@.." output="@Visual" />
        </Node>
        <Node name="Surf2">
            <MeshObjLoader name="loader" filename="mesh/torus2_for_collision.obj" />
            <Mesh src="@loader" />
            <MechanicalObject src="@loader" />
            <Triangle />
            <Line />
            <Point />
            <RigidMapping />
        </Node>
    </Node>
    <Node name="CFEM_Torus_1">
        <EulerImplicit />
        <CGLinearSolver iterations="100" threshold="0.00000001" tolerance="1e-05"/>
        <MeshGmshLoader name="loader" filename="mesh/torus_low_res.msh" />
        <Mesh src="@loader" />
        <MechanicalObject dx="20.7850" dy="0.1285" dz="15.4381" rx="-36.1968" ry="38.9599" rz="6.3146" src="@loader" />
        <UniformMass totalmass="5" />
        <TetrahedronFEMForceField computeGlobalMatrix="false" method="polar" name="FEM" poissonRatio="0.3" youngModulus="5000" />
        <Node name="Visu">
            <MeshObjLoader name="meshLoader5" filename="mesh/torus.obj" />
            <OglModel color="1.000 0.000 0.000" dx="20.7850" dy="0.1285" dz="15.4381" src="@meshLoader5" name="Visual" rx="-36.1968" ry="38.9599" rz="6.3146" />
            <BarycentricMapping input="@.." output="@Visual" />
        </Node>
        <Node name="Surf2">
            <MeshObjLoader name="loader" filename="mesh/torus_for_collision.obj" />
            <Mesh src="@loader" />
            <MechanicalObject dx="20.7850" dy="0.1285" dz="15.4381" rx="-36.1968" ry="38.9599" rz="6.3146" src="@loader" />
            <Triangle />
            <Line />
            <Point />
            <BarycentricMapping />
        </Node>
    </Node>
    <Node name="CFEM_Torus_2">
        <EulerImplicit />
        <CGLinearSolver iterations="100" threshold="0.00000001" />
        <MeshGmshLoader name="loader" filename="mesh/torus2_low_res.msh" />
        <Mesh src="@loader" />
        <MechanicalObject dx="22.1025" dy="-0.1037" dz="13.4780" rx="-26.3682" ry="62.5274" rz="-0.8890" src="@loader" />
        <UniformMass totalmass="5" />
        <TetrahedronFEMForceField computeGlobalMatrix="false" method="polar" name="FEM" poissonRatio="0.3" youngModulus="5000" />
        <Node name="Visu">
            <MeshObjLoader name="meshLoader6" filename="mesh/torus2.obj" />
            <OglModel color="1.000 0.000 0.000" dx="22.1025" dy="-0.1037" dz="13.4780" src="@meshLoader6" name="Visual" rx="-26.3682" ry="62.5274" rz="-0.8890" />
            <BarycentricMapping input="@.." output="@Visual" />
        </Node>
        <Node name="Surf2">
            <MeshObjLoader name="loader" filename="mesh/torus2_for_collision.obj" />
            <Mesh src="@loader" />
            <MechanicalObject dx="22.1025" dy="-0.1037" dz="13.4780" rx="-26.3682" ry="62.5274" rz="-0.8890" src="@loader" />
            <Triangle />
            <Line />
            <Point />
            <BarycentricMapping />
        </Node>
    </Node>
    <Node name="CFEM_Torus_3">
        <EulerImplicit />
        <CGLinearSolver iterations="100" threshold="0.00000001" tolerance="1e-05"/>
        <MeshGmshLoader name="loader" filename="mesh/torus_low_res.msh" />
        <Mesh src="@loader" />
        <MechanicalObject dx="2.5428" dy="0.0000" dz="0.0195" rx="-0.0000" ry="-5.0000" rz="0.0000" src="@loader" />
        <UniformMass totalmass="5" />
        <TetrahedronFEMForceField computeGlobalMatrix="false" method="polar" name="FEM" poissonRatio="0.3" youngModulus="5000" />
        <Node name="Visu">
            <MeshObjLoader name="meshLoader7" filename="mesh/torus.obj" />
            <OglModel color="1.000 0.000 0.000" dx="2.5428" dy="0.0000" dz="0.0195" src="@meshLoader7" name="Visual" rx="-0.0000" ry="-5.0000" rz="0.0000" />
            <BarycentricMapping input="@.." output="@Visual" />
        </Node>
        <Node name="Surf2">
            <MeshObjLoader name="loader" filename="mesh/torus_for_collision.obj" />
            <Mesh src="@loader" />
            <MechanicalObject dx="2.5428" dy="0.0000" dz="0.0195" rx="-0.0000" ry="-5.0000" rz="0.0000" src="@loader" />
            <Triangle />
            <Line />
            <Point />
            <BarycentricMapping />
        </Node>
    </Node>
    <Node name="CFEM_Torus_4">
        <EulerImplicit />
        <CGLinearSolver iterations="100" threshold="0.00000001" tolerance="1e-05"/>
        <MeshGmshLoader name="loader" filename="mesh/torus2_low_res.msh" />
        <Mesh src="@loader" />
        <MechanicalObject dx="5.1472" dy="0.0000" dz="0.3725" rx="5.0000" ry="-10.0000" rz="0.0000" src="@loader" />
        <UniformMass totalmass="5" />
        <TetrahedronFEMForceField computeGlobalMatrix="false" method="polar" name="FEM" poissonRatio="0.3" youngModulus="5000" />
        <Node name="Visu">
            <MeshObjLoader name="meshLoader8" filename="mesh/torus2.obj" />
            <OglModel color="1.000 0.000 0.000" dx="5.1472" dy="0.0000" dz="0.3725" src="@meshLoader8" name="Visual" rx="5.0000" ry="-10.0000" rz="0.0000" />
            <BarycentricMapping input="@.." output="@Visual" />
        </Node>
        <Node name="Surf2">
            <MeshObjLoader name="loader" filename="mesh/torus2_for_collision.obj" />
            <Mesh src="@loader" />
            <MechanicalObject dx="5.1472" dy="0.0000" dz="0.3725" rx="5.0000" ry="-10.0000" rz="0.0000" src="@loader" />
            <Triangle />
            <Line />
            <Point />
            <BarycentricMapping />
        </Node>
    </Node>
    <Node name="CSpring_Torus_1">
        <EulerImplicit />
        <CGLinearSolver iterations="100" threshold="0.00000001" tolerance="1e-05"/>
        <MeshGmshLoader name="loader" filename="mesh/torus_low_res.msh" />
        <Mesh src="@loader" />
        <MechanicalObject dx="16.6441" dy="0.0000" dz="6.3875" rx="30.0000" ry="-40.0000" rz="0.0000" src="@loader" />
        <UniformMass totalmass="5" />
        <MeshSpringForceField name="Springs" tetrasDamping="4" tetrasStiffness="1000" />
        <Node name="Visu">
            <MeshObjLoader name="meshLoader9" filename="mesh/torus.obj" />
            <OglModel color="0.000 1.000 0.000" dx="16.6441" dy="0.0000" dz="6.3875" src="@meshLoader9" name="Visual" rx="30.0000" ry="-40.0000" rz="0.0000" />
            <BarycentricMapping input="@.." output="@Visual" />
        </Node>
        <Node name="Surf2">
            <MeshObjLoader name="loader" filename="mesh/torus_for_collision.obj" />
            <Mesh src="@loader" />
            <MechanicalObject dx="16.6441" dy="0.0000" dz="6.3875" rx="30.0000" ry="-40.0000" rz="0.0000" src="@loader" />
            <Triangle />
            <Line />
            <Point />
            <BarycentricMapping />
        </Node>
    </Node>
    <Node name="CSpring_Torus_2">
        <EulerImplicit />
        <CGLinearSolver iterations="100" threshold="0.00000001" tolerance="1e-05"/>
        <MeshGmshLoader name="loader" filename="mesh/torus2_low_res.msh" />
        <Mesh src="@loader" />
        <MechanicalObject dx="18.5592" dy="0.0000" dz="7.9944" rx="48.8686" ry="-40.0000" rz="0.0000" src="@loader" />
        <UniformMass totalmass="5" />
        <MeshSpringForceField name="Springs" tetrasDamping="4" tetrasStiffness="1000" />
        <Node name="Visu">
            <MeshObjLoader name="meshLoader10" filename="mesh/torus2.obj" />
            <OglModel color="0.000 1.000 0.000" dx="18.5592" dy="0.0000" dz="7.9944" src="@meshLoader10" name="Visual" rx="48.8686" ry="-40.0000" rz="0.0000" />
            <BarycentricMapping input="@.." output="@Visual" />
        </Node>
        <Node name="Surf2">
            <MeshObjLoader name="loader" filename="mesh/torus2_for_collision.obj" />
            <Mesh src="@loader" />
            <MechanicalObject dx="18.5592" dy="0.0000" dz="7.9944" rx="48.8686" ry="-40.0000" rz="0.0000" src="@loader" />
            <Triangle />
            <Line />
            <Point />
            <BarycentricMapping />
        </Node>
    </Node>
    <Node name="CSpring_Torus_3">
        <EulerImplicit />
        <CGLinearSolver iterations="100" threshold="0.00000001" tolerance="1e-05"/>
        <MeshGmshLoader name="loader" filename="mesh/torus_low_res.msh" />
        <Mesh src="@loader" />
        <MechanicalObject src="@loader" dx="20.4743" dy="0.0000" dz="9.6014" rx="56.6532" ry="-40.0000" rz="-0.0000" />
        <UniformMass totalmass="5" />
        <MeshSpringForceField name="Springs" tetrasDamping="4" tetrasStiffness="1000" />
        <Node name="Visu">
            <MeshObjLoader name="meshLoader11" filename="mesh/torus.obj" />
            <OglModel color="0.000 1.000 0.000" dx="20.4743" dy="0.0000" dz="9.6014" src="@meshLoader11" name="Visual" rx="56.6532" ry="-40.0000" rz="-0.0000" />
            <BarycentricMapping input="@.." output="@Visual" />
        </Node>
        <Node name="Surf2">
            <MeshObjLoader name="loader" filename="mesh/torus_for_collision.obj" />
            <Mesh src="@loader" />
            <MechanicalObject dx="20.4743" dy="0.0000" dz="9.6014" rx="56.6532" ry="-40.0000" rz="-0.0000" src="@loader" />
            <Triangle />
            <Line />
            <Point />
            <BarycentricMapping />
        </Node>
    </Node>
    <Node name="CSpring_Torus_4">
        <EulerImplicit />
        <CGLinearSolver iterations="100" threshold="0.00000001" tolerance="1e-05"/>
        <MeshGmshLoader name="loader" filename="mesh/torus2_low_res.msh" />
        <Mesh src="@loader" />
        <MechanicalObject src="@loader" dx="22.4849" dy="-0.1005" dz="11.2034" rx="85.4976" ry="-41.5228" rz="4.1695" />
        <UniformMass totalmass="5" />
        <MeshSpringForceField name="Springs" tetrasDamping="4" tetrasStiffness="1000" />
        <Node name="Visu">
            <MeshObjLoader name="meshLoader12" filename="mesh/torus2.obj" />
            <OglModel color="0.000 1.000 0.000" dx="22.4849" dy="-0.1005" dz="11.2034" src="@meshLoader12" name="Visual" rx="85.4976" ry="-41.5228" rz="4.1695" />
            <BarycentricMapping input="@.." output="@Visual" />
        </Node>
        <Node name="Surf2">
            <MeshObjLoader name="loader" filename="mesh/torus2_for_collision.obj" />
            <Mesh src="@loader" />
            <MechanicalObject dx="22.4849" dy="-0.1005" dz="11.2034" rx="85.4976" ry="-41.5228" rz="4.1695" src="@loader" />
            <Triangle />
            <Line />
            <Point />
            <BarycentricMapping />
        </Node>
    </Node>
    <Node name="CFFD_Torus_1">
        <EulerImplicit />
        <CGLinearSolver iterations="100" threshold="0.00000001" tolerance="1e-05"/>
        <MechanicalObject dx="12.2149" dy="0.0000" dz="21.0581" rx="-20.0000" ry="25.0000" rz="0.0000" />
        <UniformMass totalmass="5" />
        <RegularGrid nx="6" ny="2" nz="5" xmax="2.5" xmin="-2.5" ymax="0.5" ymin="-0.5" zmax="2" zmin="-2" />
        <RegularGridSpringForceField damping="2" name="Springs" stiffness="200" />
        <Node name="Visu">
            <MeshObjLoader name="meshLoader13" filename="mesh/torus.obj" />
            <OglModel color="1.000 1.000 0.000" src="@meshLoader13" name="Visual" />
            <BarycentricMapping input="@.." output="@Visual" />
        </Node>
        <Node name="Surf2">
            <MeshObjLoader name="loader" filename="mesh/torus_for_collision.obj" />
            <Mesh src="@loader" />
            <MechanicalObject src="@loader" />
            <Triangle />
            <Line />
            <Point />
            <BarycentricMapping />
        </Node>
    </Node>
    <Node name="CFFD_Torus_2">
        <EulerImplicit />
        <CGLinearSolver iterations="100" threshold="0.00000001" tolerance="1e-05"/>
        <MechanicalObject dx="14.5348" dy="0.0000" dz="19.7939" rx="-25.0000" ry="30.0000" rz="0.0000" />
        <UniformMass totalmass="5" />
        <RegularGrid nx="6" ny="5" nz="2" xmax="2.5" xmin="-2.5" ymax="2" ymin="-2" zmax="0.5" zmin="-0.5" />
        <RegularGridSpringForceField damping="2" name="Springs" stiffness="200" />
        <Node name="Visu">
            <MeshObjLoader name="meshLoader14" filename="mesh/torus2.obj" />
            <OglModel color="1.000 1.000 0.000" src="@meshLoader14" name="Visual" />
            <BarycentricMapping input="@.." output="@Visual" />
        </Node>
        <Node name="Surf2">
            <MeshObjLoader name="loader" filename="mesh/torus2_for_collision.obj" />
            <Mesh src="@loader" />
            <MechanicalObject src="@loader" />
            <Triangle />
            <Line />
            <Point />
            <BarycentricMapping />
        </Node>
    </Node>
    <Node name="CFFD_Torus_3">
        <EulerImplicit />
        <CGLinearSolver iterations="100" threshold="0.00000001" tolerance="1e-05"/>
        <MechanicalObject dx="16.7666" dy="0.0000" dz="18.3835" rx="-30.0000" ry="35.0000" rz="0.0000" />
        <UniformMass totalmass="5" />
        <RegularGrid nx="6" ny="2" nz="5" xmax="2.5" xmin="-2.5" ymax="0.5" ymin="-0.5" zmax="2" zmin="-2" />
        <RegularGridSpringForceField damping="2" name="Springs" stiffness="200" />
        <Node name="Visu">
            <MeshObjLoader name="meshLoader15" filename="mesh/torus.obj" />
            <OglModel color="1.000 1.000 0.000" src="@meshLoader15" name="Visual" />
            <BarycentricMapping input="@.." output="@Visual" />
        </Node>
        <Node name="Surf2">
            <MeshObjLoader name="loader" filename="mesh/torus_for_collision.obj" />
            <Mesh src="@loader" />
            <MechanicalObject src="@loader" />
            <Triangle />
            <Line />
            <Point />
            <BarycentricMapping />
        </Node>
    </Node>
    <Node name="CFFD_Torus_4">
        <EulerImplicit />
        <CGLinearSolver iterations="100" threshold="0.00000001" tolerance="1e-05"/>
        <MechanicalObject dx="18.8145" dy="0.0000" dz="16.9496" rx="-35.0000" ry="35.0000" rz="0.0000" />
        <UniformMass totalmass="5" />
        <RegularGrid nx="6" ny="5" nz="2" xmax="2.5" xmin="-2.5" ymax="2" ymin="-2" zmax="0.5" zmin="-0.5" />
        <RegularGridSpringForceField damping="2" name="Springs" stiffness="200" />
        <Node name="Visu">
            <MeshObjLoader name="meshLoader16" filename="mesh/torus2.obj" />
            <OglModel color="1.000 1.000 0.000" src="@meshLoader16" name="Visual" />
            <BarycentricMapping input="@.." output="@Visual" />
        </Node>
        <Node name="Surf2">
            <MeshObjLoader name="loader" filename="mesh/torus2_for_collision.obj" />
            <Mesh src="@loader" />
            <MechanicalObject src="@loader" />
            <Triangle />
            <Line />
            <Point />
            <BarycentricMapping />
        </Node>
    </Node>
    <Node name="CRigid_TorusFixed">
        <MeshObjLoader name="loader" filename="mesh/torus2_for_collision.obj" />
        <Mesh src="@loader" />
        <MechanicalObject dx="0.0000" dy="0.0000" dz="24.0000" rx="0.0000" ry="0.0000" rz="0.0000" src="@loader" />
        <Triangle moving="0" simulated="0" />
        <Line moving="0" simulated="0" />
        <Point moving="0" simulated="0" />
        <MeshObjLoader name="meshLoader17" filename="mesh/torus2.obj" />
        <OglModel color="0.500 0.500 0.500" dx="0.0000" dy="0.0000" dz="24.0000" src="@meshLoader17" name="Visual" rx="0.0000" ry="0.0000" rz="0.0000" />
    </Node>
    <Node name="CRigid_Torus_1">
        <EulerImplicit />
        <CGLinearSolver iterations="100" threshold="0.00000001" tolerance="1e-05"/>
        <MechanicalObject dx="2.5428" dy="0.0000" dz="23.9805" rx="-0.0000" ry="5.0000" rz="-0.0000" template="Rigid" />
        <UniformMass />
        <Node name="Visu">
            <MeshObjLoader name="meshLoader18" filename="mesh/torus.obj" />
            <OglModel color="0.500 0.500 0.500" src="@meshLoader18" name="Visual" />
            <RigidMapping input="@.." output="@Visual" />
        </Node>
        <Node name="Surf2">
            <MeshObjLoader name="loader" filename="mesh/torus_for_collision.obj" />
            <Mesh src="@loader" />
            <MechanicalObject src="@loader" />
            <Triangle />
            <Line />
            <Point />
            <RigidMapping />
        </Node>
    </Node>
    <Node name="CRigid_Torus_2">
        <EulerImplicit />
        <CGLinearSolver iterations="100" threshold="0.00000001" tolerance="1e-05"/>
        <MechanicalObject dx="5.1472" dy="0.0000" dz="23.6275" rx="-5.0000" ry="10.0000" rz="0.0000" template="Rigid" />
        <UniformMass />
        <Node name="Visu">
            <MeshObjLoader name="meshLoader19" filename="mesh/torus2.obj" />
            <OglModel color="0.500 0.500 0.500" src="@meshLoader19" name="Visual" />
            <RigidMapping input="@.." output="@Visual" />
        </Node>
        <Node name="Surf2">
            <MeshObjLoader name="loader" filename="mesh/torus2_for_collision.obj" />
            <Mesh src="@loader" />
            <MechanicalObject src="@loader" />
            <Triangle />
            <Line />
            <Point />
            <RigidMapping />
        </Node>
    </Node>
    <Node name="CRigid_Torus_3">
        <EulerImplicit />
        <CGLinearSolver iterations="100" threshold="0.00000001" tolerance="1e-05"/>
        <MechanicalObject dx="7.5617" dy="0.0000" dz="23.1296" rx="-10.0000" ry="15.0000" rz="0.0000" template="Rigid" />
        <UniformMass />
        <Node name="Visu">
            <MeshObjLoader name="meshLoader20" filename="mesh/torus.obj" />
            <OglModel color="0.500 0.500 0.500" src="@meshLoader20" name="Visual" />
            <RigidMapping input="@.." output="@Visual" />
        </Node>
        <Node name="Surf2">
            <MeshObjLoader name="loader" filename="mesh/torus_for_collision.obj" />
            <Mesh src="@loader" />
            <MechanicalObject src="@loader" />
            <Triangle />
            <Line />
            <Point />
            <RigidMapping />
        </Node>
    </Node>
    <Node name="CRigid_Torus_4">
        <EulerImplicit />
        <CGLinearSolver iterations="100" threshold="0.00000001" tolerance="1e-05"/>
        <MechanicalObject dx="9.9491" dy="0.0000" dz="22.1146" rx="-15.0000" ry="25.0000" rz="0.0000" template="Rigid" />
        <UniformMass />
        <Node name="Visu">
            <MeshObjLoader name="meshLoader21" filename="mesh/torus2.obj" />
            <OglModel color="0.500 0.500 0.500" src="@meshLoader21" name="Visual" />
            <RigidMapping input="@.." output="@Visual" />
        </Node>
        <Node name="Surf2">
            <MeshObjLoader name="loader" filename="mesh/torus2_for_collision.obj" />
            <Mesh src="@loader" />
            <MechanicalObject src="@loader" />
            <Triangle />
            <Line />
            <Point />
            <RigidMapping />
        </Node>
    </Node>
</Node>
