<?xml version="1.0"?>
<Node name="root" dt="0.02">
    <CollisionPipeline verbose="0" draw="0"/>
    <BruteForceDetection name="N2" />
    <NewProximityIntersection name="Proximity" alarmDistance="0.3" contactDistance="0.2" />
    <CollisionResponse name="Response" response="default" />
    <CollisionGroup name="Group" />
    <Node name="Chain">
        <Node name="Fixed">
            <MeshObjLoader name="loader" filename="mesh/torus_for_collision.obj" />
            <Mesh src="@loader" />
            <MechanicalObject src="@loader" rx="90" />
            <Triangle simulated="0" moving="0" />
            <MeshObjLoader name="meshLoader0" filename="mesh/torus.obj" />
            <OglModel name="Visual" src="@meshLoader0" color="gray" rx="90" />
        </Node>
        <include name="FEM" href="Objects/TorusFEM.xml" dx="2.5" />
        <include name="Spring" href="Objects/TorusSpring.xml" dx="5" rx="90" />
        <include name="FFD" href="Objects/TorusFFD.xml" dx="7.5" />
        <include name="TorusRigid" href="Objects/TorusRigid.xml" dx="10" rx="90" />
    </Node>
</Node>
