<Node name="root" dt="0.03333">
    <CollisionPipeline verbose="0" depth="10" draw="0" />
	<FreeMotionAnimationLoop  threadNumber="0"/>
    <LCPConstraintSolver tolerance="1e-3" maxIt="1000" initial_guess="false" build_lcp="false"  printLog="0" mu="0.2"/>
    <BruteForceDetection name="N2" />
    <MinProximityIntersection name="Proximity" alarmDistance="0.75" contactDistance="0.5" />
    <CollisionResponse name="Response" response="FrictionContact" />
    <CollisionGroup name="Group" />

    <Node name="Torus">
        <EulerImplicit name="cg_odesolver" printLog="false"  rayleighStiffness="0.1" rayleighMass="0.1" verbose="true"/>
        <CGLinearSolver iterations="25" name="linear solver" tolerance="1.0e-9" threshold="1.0e-9" />
        <MechanicalObject dx="0" dy="20" dz="29" rz="64" />
        <UniformMass totalMass="10" />
        <RegularGrid nx="6" ny="5" nz="2" xmin="-7.5" xmax="7.5" ymin="-6" ymax="6" zmin="-1.75" zmax="1.75" />
        <RegularGridSpringForceField name="Springs" stiffness="350" damping="1" />
		<UncoupledConstraintCorrection/>
        <Node name="VisuTorus" tags="Visual">
            <OglModel name="Visual" filename="mesh/torus2_scale3.obj" color="blue" />
            <BarycentricMapping input="@.." output="@Visual" />
        </Node>
        <Node name="Surf">
            <MeshObjLoader name="loader" filename="mesh/torus2_scale3.obj" />
            <Mesh src="@loader" />
            <MechanicalObject src="@loader"/>
            <Triangle />
            <Line />
            <Point />
            <BarycentricMapping />
        </Node>
    </Node>
    <Node name="Dragon">
        <EulerImplicit name="cg_odesolver" printLog="false" />
        <CGLinearSolver iterations="25" name="linear solver" tolerance="1.0e-9" threshold="1.0e-9" />
        <MechanicalObject dx="20" dy="20" dz="29" rx="33" />
        <UniformMass totalMass="10" />
        <RegularGrid nx="6" ny="5" nz="3" xmin="-11" xmax="11" ymin="-7" ymax="7" zmin="-4" zmax="4" />
        <RegularGridSpringForceField name="Springs" stiffness="350" damping="1" />
		<UncoupledConstraintCorrection/>
        <Node name="VisuDragon" tags="Visual">
            <OglModel name="Visual" filename="mesh/dragon.obj" color="red" />
            <BarycentricMapping input="@.." output="@Visual" />
        </Node>
        <Node name="Surf">
            <MeshObjLoader name="loader" filename="mesh/dragon.obj" />
            <Mesh src="@loader" />
            <MechanicalObject src="@loader" />
            <Triangle />
            <Line />
            <Point />
            <BarycentricMapping />
        </Node>
    </Node>
    <Node name="Frog">
        <EulerImplicit name="cg_odesolver" printLog="false" />
        <CGLinearSolver iterations="25" name="linear solver" tolerance="1.0e-9" threshold="1.0e-9" />
        <MechanicalObject dx="-20" dy="20" dz="29" ry="10" />
        <UniformMass totalMass="10" />
        <RegularGrid nx="6" ny="3" nz="5" xmin="-10" xmax="8" ymin="-3" ymax="2.5" zmin="-7" zmax="7" />
        <RegularGridSpringForceField name="Springs" stiffness="350" damping="1" />
		<UncoupledConstraintCorrection/>
        <Node name="VisualFrog" tags="Visual">
            <Node name="Visu1">
                <OglModel name="VisualBody" filename="mesh/frog_body.obj" normals="0" color="0.17 0.70 0.05" />
                <BarycentricMapping input="@.." output="@VisualBody" />
            </Node>
            <Node name="Visu2">
                <OglModel name="VisualEyes" filename="mesh/frog_eyes.obj" normals="0" color="0.04 0.19 0.52" />
                <BarycentricMapping input="@.." output="@VisualEyes" />
            </Node>
            <Node name="Visu3">
                <OglModel name="VisualEyebrows" filename="mesh/frog_eyebrows.obj" normals="0" color="0.44 0.43 0.00" />
                <BarycentricMapping input="@.." output="@VisualEyebrows" />
            </Node>
            <Node name="Visu4">
                <OglModel name="VisualLips" filename="mesh/frog_lips.obj" normals="0" color="0.47 0.25 0.03" />
                <BarycentricMapping input="@.." output="@VisualLips" />
            </Node>
        </Node>
        <Node name="Surf">
            <MeshObjLoader name="loader" filename="mesh/frog-push25.obj" />
            <Mesh src="@loader" />
            <MechanicalObject src="@loader" />
            <Triangle />
            <Line />
            <Point />
            <BarycentricMapping />
        </Node>
    </Node>
    <Node name="Floor">
        <MeshObjLoader name="loader" filename="mesh/floor2b.obj" />
        <Mesh src="@loader" />
        <MechanicalObject src="@loader" dy="-10.25" scale="0.5" />
        <Triangle name="Floor" simulated="0" moving="0" />
        <Line name="Floor" simulated="0" moving="0" />
        <Point name="Floor" simulated="0" moving="0" />
        <OglModel name="FloorV" filename="mesh/floor2b.obj" scale="0.5" texturename="textures/floor.bmp" dy="-10" />
    </Node>
</Node>
