<?xml version="1.0" ?>
<!-- See http://wiki.sofa-framework.org/wiki/TutorialMappingDragonRigid -->
<Node name="root" dt="0.01" gravity="0 0 -9.81">
    <VisualStyle displayFlags="showVisual showBehavior" />
    <EulerImplicitSolver name="EulerImplicit"  rayleighStiffness="0.1" rayleighMass="0.1" />
    <CGLinearSolver name="CG Solver" iterations="25" tolerance="1e-5" threshold="1e-5"/>
    <MechanicalObject name="RigidDOF" template="Rigid" dz="1" rotation="90 0 -90" />
    <UniformMass name="Mass" filename="BehaviorModels/dragon.rigid" />
    <Node name="DragonVisual">
        <MeshObjLoader name="meshLoader0" filename="mesh/dragon.obj" scale="0.1" />
        <OglModel name="DragonVisualParticles" src="@meshLoader0" />
        <RigidMapping name="RigidMapping1" input="@../RigidDOF" output="@DragonVisualParticles" />
    </Node>
    <Node name="Dragon">
        <MeshObjLoader name="loader" filename="mesh/dragon.obj" />
        <MechanicalObject src="@loader" name="DragonParticles" scale="0.1" />
        <PlaneForceField name="Floor" normal="0 0.2 1" stiffness="100" damping="1" draw="1" />
        <PlaneForceField name="Wall" normal="0 -1 0" d="-4" stiffness="100" damping="1" draw="1" color="1 1 1" />
        <RigidMapping name="RigidMapping2" input="@../RigidDOF" output="@DragonParticles" />
    </Node>
</Node>
