<Node name="root" gravity="0 -9.81 0" dt="0.05" time="0" animate="0" multiThreadSimulation="0">
    <VisualStyle displayFlags="showVisual showInteractionForceFields" />
    <DefaultPipeline name="default94" />
    <BruteForceDetection name="N2" />
    <MinProximityIntersection name="default2" alarmDistance="3" contactDistance="2.5" />
    <DefaultContactManager name="default3" response="default" />
    <Node name="Super Teo" activated="1" gravity="0 0 -9.81" dt="0.01" time="0" animate="0" multiThreadSimulation="0" currentLevel="0" coarsestLevel="3" finestLevel="0">
        <EulerImplicitSolver name="default95"  rayleighStiffness="0.1" rayleighMass="0.1" />
        <CGLinearSolver template="GraphScattered" name="default96" iterations="25" tolerance="1e-5" threshold="1e-5"/>
        <MechanicalObject template="Rigid" name="default31" position="-19.9371 16.6874 16.6048 0 0 0 1 -19.9371 20.8088 12.805 0 0 0 1 -18.1155 12.0796 17.7564 0 0 0 1 -15.6349 6.0338 18.7333 0 0 0 1 -14.7096 -1.6289 19.0586 0 0 0 1 -14.875 -7.5382 18.9706 0 0 0 1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" velocity="0 0 0 0 0 0 0 0 0 0 0 0 0 0 0 0 0 0 0 0 0 0 0 0 0 0 0 0 0 0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" rest_position="0.0628811 36.6874 -0.395158 0 0 0 1 0.0628811 40.5861 -4.24681 0 0 0 1 1.88452 32.0796 0.756428 0 0 0 1 4.36507 26.0338 1.73326 0 0 0 1 5.24626 18.3711 2.13413 0 0 0 1 5.06602 12.4618 2.09795 0 0 0 1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" translation="2 5 -20" rotation="90 0 0" />
        <DiagonalMass template="Rigid" name="default12" separateGravity="0" mass="15 15 [20 0 0,0 20 0,0 0 20] 15 15 [40 0 0,0 40 0,0 0 40] 1 1 [1 0 0,0 1 0,0 0 1] 1 1 [1 0 0,0 1 0,0 0 1] 1 1 [1 0 0,0 1 0,0 0 1] 1 1 [1 0 0,0 1 0,0 0 1] 1 1 [1 0 0,0 1 0,0 0 1] 1 1 [1 0 0,0 1 0,0 0 1] 1 1 [1 0 0,0 1 0,0 0 1] 1 1 [1 0 0,0 1 0,0 0 1] 1 1 [1 0 0,0 1 0,0 0 1] 1 1 [1 0 0,0 1 0,0 0 1] 1 1 [1 0 0,0 1 0,0 0 1] 1 1 [1 0 0,0 1 0,0 0 1] 1 1 [1 0 0,0 1 0,0 0 1] 1 1 [1 0 0,0 1 0,0 0 1] 1 1 [1 0 0,0 1 0,0 0 1] 1 1 [1 0 0,0 1 0,0 0 1] 1 1 [1 0 0,0 1 0,0 0 1] 1 1 [1 0 0,0 1 0,0 0 1] 1 1 [1 0 0,0 1 0,0 0 1] 1 1 [1 0 0,0 1 0,0 0 1] 1 1 [1 0 0,0 1 0,0 0 1] 1 1 [1 0 0,0 1 0,0 0 1] 1 1 [1 0 0,0 1 0,0 0 1] 1 1 [1 0 0,0 1 0,0 0 1] 1 1 [1 0 0,0 1 0,0 0 1] 1 1 [1 0 0,0 1 0,0 0 1] 1 1 [1 0 0,0 1 0,0 0 1] 1 1 [1 0 0,0 1 0,0 0 1] 1 1 [1 0 0,0 1 0,0 0 1] 1 1 [1 0 0,0 1 0,0 0 1] 1 1 [1 0 0,0 1 0,0 0 1] 1 1 [1 0 0,0 1 0,0 0 1] 1 1 [1 0 0,0 1 0,0 0 1] 1 1 [1 0 0,0 1 0,0 0 1] 1 1 [1 0 0,0 1 0,0 0 1] 1 1 [1 0 0,0 1 0,0 0 1] 1 1 [1 0 0,0 1 0,0 0 1] 1 1 [1 0 0,0 1 0,0 0 1] 1 1 [1 0 0,0 1 0,0 0 1] 1 1 [1 0 0,0 1 0,0 0 1] 1 1 [1 0 0,0 1 0,0 0 1] 1 1 [1 0 0,0 1 0,0 0 1] 1 1 [1 0 0,0 1 0,0 0 1] 1 1 [1 0 0,0 1 0,0 0 1] 1 1 [1 0 0,0 1 0,0 0 1] 1 1 [1 0 0,0 1 0,0 0 1] 1 1 [1 0 0,0 1 0,0 0 1] 1 1 [1 0 0,0 1 0,0 0 1] 1 1 [1 0 0,0 1 0,0 0 1] 1 1 [1 0 0,0 1 0,0 0 1] 1 1 [1 0 0,0 1 0,0 0 1] 1 1 [1 0 0,0 1 0,0 0 1] 1 1 [1 0 0,0 1 0,0 0 1] 1 1 [1 0 0,0 1 0,0 0 1] 1 1 [1 0 0,0 1 0,0 0 1] 1 1 [1 0 0,0 1 0,0 0 1]" />
        <Node name="Joints" activated="1" gravity="0 0 -9.81" dt="0.01" time="0" animate="0" multiThreadSimulation="0">
            <MechanicalObject template="Rigid" name="default33" position="8.12531e-09 -3.2131 0.395158 0 0 0 1 -8.12531e-09 3.2131 -0.395158 -0.0324492 0 0 0.999473 0 -0.685612 3.45649 -0.0324492 0 0 0.999473 0 0.685612 -3.45649 -0.0324492 0 0 0.999473 -1.82164 1.39468 -0.756428 0 0 0 1 1.82164 -1.39468 0.756428 0 -0.18641 0 0.982472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" velocity="0 0 0 0 0 0 0 0 0 0 0 0 0 0 0 0 0 0 0 0 0 0 0 0 0 0 0 0 0 0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" rest_position="8.12531e-09 -3.2131 0.395158 0 0 0 1 -8.12531e-09 3.2131 -0.395158 -0.0324492 0 0 0.999473 0 -0.685612 3.45649 -0.0324492 0 0 0.999473 0 0.685612 -3.45649 -0.0324492 0 0 0.999473 -1.82164 1.39468 -0.756428 0 0 0 1 1.82164 -1.39468 0.756428 0 -0.18641 0 0.982472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" />
            <RigidRigidMapping template="Rigid,Rigid" name="default35" initialPoints="8.12531e-09 -3.2131 0.395158 0 0 0 1 -8.12531e-09 3.2131 -0.395158 -0.0324492 0 0 0.999473 0 -0.685612 3.45649 -0.0324492 0 0 0.999473 0 0.685612 -3.45649 -0.0324492 0 0 0.999473 -1.82164 1.39468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" />
            <JointSpringForceField template="Rigid" name="default34" spring="BEGIN_SPRING  1 2  FREE_AXIS 0 0 0 0 0 1  KS_T 10 100000  KS_R 1000 10000  KD 0.1  END_SPRING&#x0A; BEGIN_SPRING  0 4  FREE_AXIS 0 0 0 1 0 1  KS_T 10 100000  KS_R 1000 10000  KD 0.1  END_SPRING&#x0A; BEGIN_SPRING  5 6  FREE_AXIS 0 0 0 1 0 1  KS_T 10 100000  KS_R 1000 10000  KD 0.1  END_SPRING&#x0A; BEGIN_SPRING  7 8  FREE_AXIS 0 0 0 1 0 1  KS_T 10 100000  KS_R 1000 10000  KD 0.1  END_SPRING&#x0A; BEGIN_SPRING  9 10  FREE_AXIS 0 0 0 1 0 1  KS_T 10 100000  KS_R 1000 10000  KD 0.1  END_SPRING&#x0A; BEGIN_SPRING  11 12  FREE_AXIS 0 0 0 1 0 1  KS_T 10 100000  KS_R 1000 10000  KD 0.1  END_SPRING&#x0A; BEGIN_SPRING  13 14  FREE_AXIS 0 0 0 1 0 1  KS_T 10 100000  KS_R 1000 10000  KD 0.1  END_SPRING&#x0A; BEGIN_SPRING  15 16  FREE_AXIS 0 0 0 1 0 1  KS_T 10 100000  KS_R 1000 10000  KD 0.1  END_SPRING&#x0A; BEGIN_SPRING  0 18  FREE_AXIS 0 0 0 1 0 1  KS_T 10 100000  KS_R 1000 10000  KD 0.1  END_SPRING&#x0A; BEGIN_SPRING  19 20  FREE_AXIS 0 0 0 1 0 1  KS_T 10 100000  KS_R 1000 10000  KD 0.1  END_SPRING&#x0A; BEGIN_SPRING  21 22  FREE_AXIS 0 0 0 1 0 1  KS_T 10 100000  KS_R 1000 10000  KD 0.1  END_SPRING&#x0A; BEGIN_SPRING  23 24  FREE_AXIS 0 0 0 1 0 1  KS_T 10 100000  KS_R 1000 10000  KD 0.1  END_SPRING&#x0A; BEGIN_SPRING  25 26  FREE_AXIS 0 0 0 1 0 1  KS_T 10 100000  KS_R 1000 10000  KD 0.1  END_SPRING&#x0A; BEGIN_SPRING  27 28  FREE_AXIS 0 0 0 1 0 1  KS_T 10 100000  KS_R 1000 10000  KD 0.1  END_SPRING&#x0A; BEGIN_SPRING  29 30  FREE_AXIS 0 0 0 1 0 1  KS_T 10 100000  KS_R 1000 10000  KD 0.1  END_SPRING&#x0A; BEGIN_SPRING  0 32  FREE_AXIS 0 0 0 1 0 1  KS_T 10 100000  KS_R 1000 10000  KD 0.1  END_SPRING&#x0A; BEGIN_SPRING  33 34  FREE_AXIS 0 0 0 1 0 1  KS_T 10 100000  KS_R 1000 10000  KD 0.1  END_SPRING&#x0A; BEGIN_SPRING  35 36  FREE_AXIS 0 0 0 1 0 1  KS_T 10 100000  KS_R 1000 10000  KD 0.1  END_SPRING&#x0A; BEGIN_SPRING  37 38  FREE_AXIS 0 0 0 1 0 1  KS_T 10 100000  KS_R 1000 10000  KD 0.1  END_SPRING&#x0A; BEGIN_SPRING  39 40  FREE_AXIS 0 0 0 1 0 1  KS_T 10 100000  KS_R 1000 10000  KD 0.1  END_SPRING&#x0A; BEGIN_SPRING  41 42  FREE_AXIS 0 0 0 1 0 1  KS_T 10 100000  KS_R 1000 10000  KD 0.1  END_SPRING&#x0A; BEGIN_SPRING  43 44  FREE_AXIS 0 0 0 1 0 1  KS_T 10 100000  KS_R 1000 10000  KD 0.1  END_SPRING&#x0A; BEGIN_SPRING  0 46  FREE_AXIS 0 0 0 1 0 1  KS_T 10 100000  KS_R 1000 10000  KD 0.1  END_SPRING&#x0A; BEGIN_SPRING  47 48  FREE_AXIS 0 0 0 1 0 1  KS_T 10 100000  KS_R 1000 10000  KD 0.1  END_SPRING&#x0A; BEGIN_SPRING  49 50  FREE_AXIS 0 0 0 1 0 1  KS_T 10 100000  KS_R 1000 10000  KD 0.1  END_SPRING&#x0A; BEGIN_SPRING  51 52  FREE_AXIS 0 0 0 1 0 1  KS_T 10 100000  KS_R 1000 10000  KD 0.1  END_SPRING&#x0A; BEGIN_SPRING  53 54  FREE_AXIS 0 0 0 1 0 1  KS_T 10 100000  KS_R 1000 10000  KD 0.1  END_SPRING&#x0A; BEGIN_SPRING  55 56  FREE_AXIS 0 0 0 1 0 1  KS_T 10 100000  KS_R 1000 10000  KD 0.1  END_SPRING&#x0A; BEGIN_SPRING  57 58  FREE_AXIS 0 0 0 1 0 1  KS_T 10 100000  KS_R 1000 10000  KD 0.1  END_SPRING&#x0A; BEGIN_SPRING  0 60  FREE_AXIS 0 0 0 1 0 1  KS_T 10 100000  KS_R 1000 10000  KD 0.1  END_SPRING&#x0A; BEGIN_SPRING  61 62  FREE_AXIS 0 0 0 1 0 1  KS_T 10 100000  KS_R 1000 10000  KD 0.1  END_SPRING&#x0A; BEGIN_SPRING  63 64  FREE_AXIS 0 0 0 1 0 1  KS_T 10 100000  KS_R 1000 10000  KD 0.1  END_SPRING&#x0A; BEGIN_SPRING  65 66  FREE_AXIS 0 0 0 1 0 1  KS_T 10 100000  KS_R 1000 10000  KD 0.1  END_SPRING&#x0A; BEGIN_SPRING  67 68  FREE_AXIS 0 0 0 1 0 1  KS_T 10 100000  KS_R 1000 10000  KD 0.1  END_SPRING&#x0A; BEGIN_SPRING  69 70  FREE_AXIS 0 0 0 1 0 1  KS_T 10 100000  KS_R 1000 10000  KD 0.1  END_SPRING&#x0A; BEGIN_SPRING  71 72  FREE_AXIS 0 0 0 1 0 1  KS_T 10 100000  KS_R 1000 10000  KD 0.1  END_SPRING&#x0A; BEGIN_SPRING  0 74  FREE_AXIS 0 0 0 1 0 1  KS_T 10 100000  KS_R 1000 10000  KD 0.1  END_SPRING&#x0A; BEGIN_SPRING  75 76  FREE_AXIS 0 0 0 1 0 1  KS_T 10 100000  KS_R 1000 10000  KD 0.1  END_SPRING&#x0A; BEGIN_SPRING  77 78  FREE_AXIS 0 0 0 1 0 1  KS_T 10 100000  KS_R 1000 10000  KD 0.1  END_SPRING&#x0A; BEGIN_SPRING  79 80  FREE_AXIS 0 0 0 1 0 1  KS_T 10 100000  KS_R 1000 10000  KD 0.1  END_SPRING&#x0A; BEGIN_SPRING  81 82  FREE_AXIS 0 0 0 1 0 1  KS_T 10 100000  KS_R 1000 10000  KD 0.1  END_SPRING&#x0A; BEGIN_SPRING  83 84  FREE_AXIS 0 0 0 1 0 1  KS_T 10 100000  KS_R 1000 10000  KD 0.1  END_SPRING&#x0A; BEGIN_SPRING  85 86  FREE_AXIS 0 0 0 1 0 1  KS_T 10 100000  KS_R 1000 10000  KD 0.1  END_SPRING&#x0A; BEGIN_SPRING  0 88  FREE_AXIS 0 0 0 1 0 1  KS_T 10 100000  KS_R 1000 10000  KD 0.1  END_SPRING&#x0A; BEGIN_SPRING  89 90  FREE_AXIS 0 0 0 1 0 1  KS_T 10 100000  KS_R 1000 10000  KD 0.1  END_SPRING&#x0A; BEGIN_SPRING  91 92  FREE_AXIS 0 0 0 1 0 1  KS_T 10 100000  KS_R 1000 10000  KD 0.1  END_SPRING&#x0A; BEGIN_SPRING  93 94  FREE_AXIS 0 0 0 1 0 1  KS_T 10 100000  KS_R 1000 10000  KD 0.1  END_SPRING&#x0A; BEGIN_SPRING  95 96  FREE_AXIS 0 0 0 1 0 1  KS_T 10 100000  KS_R 1000 10000  KD 0.1  END_SPRING&#x0A; BEGIN_SPRING  97 98  FREE_AXIS 0 0 0 1 0 1  KS_T 10 100000  KS_R 1000 10000  KD 0.1  END_SPRING&#x0A; BEGIN_SPRING  99 100  FREE_AXIS 0 0 0 1 0 1  KS_T 10 100000  KS_R 1000 10000  KD 0.1  END_SPRING&#x0A; BEGIN_SPRING  0 102  FREE_AXIS 0 0 0 1 0 1  KS_T 10 100000  KS_R 1000 10000  KD 0.1  END_SPRING&#x0A; BEGIN_SPRING  103 104  FREE_AXIS 0 0 0 1 0 1  KS_T 10 100000  KS_R 1000 10000  KD 0.1  END_SPRING&#x0A; BEGIN_SPRING  105 106  FREE_AXIS 0 0 0 1 0 1  KS_T 10 100000  KS_R 1000 10000  KD 0.1  END_SPRING&#x0A; BEGIN_SPRING  107 108  FREE_AXIS 0 0 0 1 0 1  KS_T 10 100000  KS_R 1000 10000  KD 0.1  END_SPRING&#x0A; BEGIN_SPRING  109 110  FREE_AXIS 0 0 0 1 0 1  KS_T 10 100000  KS_R 1000 10000  KD 0.1  END_SPRING&#x0A; BEGIN_SPRING  111 112  FREE_AXIS 0 0 0 1 0 1  KS_T 10 100000  KS_R 1000 10000  KD 0.1  END_SPRING&#x0A; BEGIN_SPRING  113 114  FREE_AXIS 0 0 0 1 0 1  KS_T 10 100000  KS_R 1000 10000  KD 0.1  END_SPRING&#x0A;" />
        </Node>
        <Node name="Collision" activated="1" gravity="0 0 -9.81" dt="0.01" time="0" animate="0" multiThreadSimulation="0">
            <MeshObjLoader name="loader" filename="mesh/Teodule_LowRes.obj" />
            <MeshTopology src="@loader" name="default47" />
            <MechanicalObject src="@loader" template="Vec3d" name="default36" translation="2 5 -20" rotation="90 0 0" />
            <TriangleModel name="Teodule Triangle" selfCollision="1" />
            <LineModel name="Teodule Line" moving="0" simulated="0" contactStiffness="100" />
            <PointModel name="Teodule Point" moving="0" simulated="0" contactStiffness="100" />
            <SkinningMapping template="Rigid,Vec3d" name="default38" isMechanical="true"  />
        </Node>
        <Node name="Visu" gravity="0 -9.81 0">
            <MeshObjLoader name="meshLoader0" filename="mesh/Teodule_Smoothed2.obj" translation="2 5 -20" rotation="90 0 0" />
            <OglModel template="ExtVec3f" name="Visual" src="@meshLoader0" texturename="textures/textureorange3569.bmp" material="Default Diffuse 1 1 1 1 1 Ambient 1 0.2 0.2 0.2 1 Specular 0 1 1 1 1 Emissive 0 1 1 1 1 Shininess 0 45" />
            <SkinningMapping template="Rigid,ExtVec3f" name="default67" input="@.." output="@Visual" />
        </Node>
    </Node>
    <Node name="Salad Bowl" gravity="0 -9.81 0">
        <MeshObjLoader name="loader" filename="mesh/SaladBowl.obj" />
        <MeshTopology src="@loader" name="default74" />
        <MechanicalObject src="@loader" template="Vec3d" name="default75" translation="0 -50 -20" rotation="-90 0 0" scale="100" />
        <TriangleModel name="Floor" moving="0" simulated="0" contactStiffness="1000" />
        <LineModel name="Floor" moving="0" simulated="0" contactStiffness="1000" />
        <PointModel name="Floor" moving="0" simulated="0" contactStiffness="1000" />
        <MeshObjLoader name="meshLoader1" filename="mesh/SaladBowl.obj" translation="0 -50 -20" rotation="-90 0 0" scale="100" />
        <OglModel template="ExtVec3f" name="FloorV" src="@meshLoader1" texturename="textures/floor.bmp" material="Default Diffuse 1 1 1 1 1 Ambient 1 0.2 0.2 0.2 1 Specular 0 1 1 1 1 Emissive 0 1 1 1 1 Shininess 0 45" />
    </Node>
</Node>
